@DSL Implicit;
@Behaviour Fcc316LForestRubinSrix;
@Author fem_inhouse project;
@Date 03 / 08 / 2026;
@Description {
  Forest-Rubin SRIX (also published as RubiX) rate-independent FCC single
  crystal plasticity, small strain.

  Samuel Forest and M. B. Rubin, A rate-independent crystal plasticity model
  with a smooth elastic-plastic transition and no slip indeterminacy,
  European Journal of Mechanics A/Solids, volume 55, pages 278 to 288, 2016.
  The DOI is quoted in docs/explanation/forest_rubin_srix.md; MFront parses
  bare DOI strings as malformed numbers, so it is deliberately absent here.

  Everything except the flow rule is shared with Fcc316LMericCailletaud: the
  same twelve octahedral slip systems, the same interaction matrix, the same
  saturating isotropic hardening (tau0, Q, b), the same Armstrong-Frederick
  kinematic hardening (C, d), the same cubic elasticity and the same implicit
  update Dp_s = |Dg_s|.

  The flow rule, equation (7)

  Meric-Cailletaud, rate dependent:

      dg_s/dt = <f_s / K>^n sign(tau_s - X_s)

  SRIX, rate independent:

      dg_s/dt = eqrate <f_s / R> sign(tau_s - X_s)

  where eqrate is the von Mises equivalent rate of the deviatoric total strain,
  equation (8). Incrementally, over a step in which the strain varies linearly:

      Dg_s = Deq <f_s / R> sign(tau_s - X_s),
      Deq  = sqrt(2/3 De : De),  De = dev(deel) + sum_s Dg_s dev(m_s).

  Time enters only through Deq, which is itself a strain measure, so the
  response depends on the strain PATH and not on how fast it is traversed.
  There is no dt anywhere below, and test_srix_is_time_independent asserts it
  stays that way.

  How Deq is built, and why it is not built from deto

  Deq is assembled from the UNKNOWNS of the implicit system, deel and dg, and
  not from the data deto. The two agree at convergence -- the elastic residual
  of the StandardElasticity brick is feel = deel - deto + sum_s Dg_s m_s, so
  deto = deel + sum_s Dg_s m_s exactly there -- but they are not
  interchangeable while iterating, and the choice decides whether the tangent
  is right.

  Writing Deq from deto would make it a CONSTANT of the local Newton system.
  The flow function would then carry an explicit dependence on deto that the
  brick does not know about, and the consistent tangent it assembles would be
  missing a rank-one term. That was measured, not feared: the tangent was
  exact in the elastic range and wrong by 2e-2 to 4e-1 relative once any
  system became active. Building Deq from deel and dg instead puts the whole
  dependence inside the Jacobian, where the brick can see it, and the same
  finite-difference comparison then agrees to 7e-7, which is the truncation
  floor of the difference itself.

  The Jacobian is still simpler than the Meric-Cailletaud one: the flow
  function is linear in f, so d(flow)/df = Deq / R replaces the Norton n v / f.
  What that linearity costs is that the Macaulay bracket no longer
  self-differentiates, so an inactive system must contribute nothing rather
  than a constant; see the dflow switch in the integrator.

  Parameters

  Every parameter below is an MFront @Parameter and can therefore be overridden
  at run time through MGIS, without editing or recompiling this file. The
  registered sets live in fem_inhouse.core.single_crystal_presets and are
  selected by identifier; the values compiled in here are the historical set
  derived from Nasri and others, 2018, kept as the default so that an
  unconfigured run reproduces the archived behaviour.

  R is NOT an identified 316L parameter. The default is the analytical
  transposition of a Meric-Cailletaud pair (K, n) through equation (16) at a
  chosen reference strain rate, computed by srix_overstress_modulus_from_meric
  in that same module: K = 12 MPa, n = 11, reference rate one thousandth per
  second. That is one way to obtain R and not the only one -- it can equally be
  identified directly, from the width of the elastic-plastic transition of a
  measured curve, which is what
  validation/srix_316l_calibration_preregistration.md registers as the intended
  route. Until then the value carries the status analytical_transposition and
  no result computed with it may be presented as a 316L identification.
}

@ModellingHypothesis Tridimensional;
@OrthotropicBehaviour;

@Algorithm NewtonRaphson;
@Epsilon 1.e-14;
@Theta 1;

@Brick StandardElasticity{
  young_modulus1 : 99950.31055900622,
  young_modulus2 : 99950.31055900622,
  young_modulus3 : 99950.31055900622,
  poisson_ratio12 : 0.3881987577639752,
  poisson_ratio23 : 0.3881987577639752,
  poisson_ratio13 : 0.3881987577639752,
  shear_modulus12 : 122000.,
  shear_modulus23 : 122000.,
  shear_modulus13 : 122000.
};

@CrystalStructure FCC;
@SlidingSystem<0, 1, -1>{1, 1, 1};
@InteractionMatrix{1.0, 1.0, 0.6, 1.8, 1.6, 12.3, 1.6};

//! Overstress modulus of the SRIX flow rule, equation (7). Replaces (K, n).
@Parameter stress R = 18.7819100705;
R.setEntryName("SrixOverstressModulus");

//! Charbonnier stress scale for the optional smooth Macaulay regularisation.
//! Zero selects the historical non-smooth SRIX law exactly.
@Parameter stress srixSmoothingEpsilon = 0.;
srixSmoothingEpsilon.setEntryName("SrixSmoothingEpsilon");

//! Exponent of the generalized Charbonnier norm used by the optional smoothing.
@Parameter real srixSmoothingExponent = 11.;
srixSmoothingExponent.setEntryName("SrixSmoothingExponent");

//! Compact C2 regularisation width for abs(dg) and its derivative.
//! Zero selects the historical abs/sign branch.
@Parameter strain srixSlipSmoothingDelta = 0.;
srixSlipSmoothingDelta.setEntryName("SrixSlipSmoothingDelta");

//! Subgradient value used only by the delta=0 branch at exactly dg=0.
//! The historical value is -1; zero is the semismooth control experiment.
@Parameter real srixSlipZeroDerivative = -1.;
srixSlipZeroDerivative.setEntryName("SrixSlipZeroDerivative");

@Parameter stress tau0 = 40.;
@Parameter stress Q = 10.;
@Parameter real b = 3.;
@Parameter real d = 1500.;
@Parameter stress C = 40000.;

/*!
 * Equivalent strain increment below which the step is treated as producing no
 * slip at all. Guards the rate-independent flow rule against a vanishing or
 * purely hydrostatic increment; see section 4.3 of the specification.
 */
@Parameter strain deqeps = 1.e-14;
deqeps.setEntryName("MinimumEquivalentStrainIncrement");

@StateVariable strain g[Nss];
g.setEntryName("PlasticSlip");

@AuxiliaryStateVariable strain p[Nss];
p.setEntryName("EquivalentPlasticSlip");

@AuxiliaryStateVariable strain a[Nss];
a.setEntryName("BackStrain");

@Integrator {
  using size_type = unsigned short;
  const auto& ss = Fcc316LForestRubinSrixSlipSystems<real>::getSlipSystems();
  const auto& m = ss.him;

  // Equation (8): equivalent measure of the deviatoric total strain increment.
  //
  // It is built from the UNKNOWNS rather than from deto. The elastic residual
  // of the StandardElasticity brick is feel = deel - deto + sum(dg_s m_s), so
  // at convergence deto = deel + sum(dg_s m_s) exactly, and since the Schmid
  // tensors are deviatoric the two readings of Deq are algebraically the same.
  //
  // Writing it this way is what makes the consistent tangent correct. Built
  // from deto, Deq is a constant of the local system and its dependence on the
  // imposed strain is invisible to the brick, which then returns a tangent
  // missing a rank-one term: measured at 2 to 42 percent in established
  // plasticity, and exact only in the elastic range. Built from deel and dg,
  // the same dependence flows through the implicit Jacobian and the brick
  // assembles the right operator with no hand-written @TangentOperator.
  //
  // It also keeps the plane-stress closure honest: every update of the
  // transverse strain changes deel and therefore Deq, so Deq is never frozen on
  // the in-plane components alone.
  auto de = deviator(deel);
  for (size_type i = 0; i != Nss; ++i) {
    de += dg[i] * ss.mus[i];
  }
  const auto deq = sqrt(2 * (de | de) / 3);

  // Section 4.3. A null or purely hydrostatic increment produces no slip. The
  // default residual fg = dg with an identity Jacobian already expresses
  // Dg = 0, and feel = deel - deto left untouched by the brick is the purely
  // elastic answer, so skipping the loop is exactly the required branch. No
  // division by deq is ever reached.
  //
  // This is a guarded block rather than an early return: the StandardElasticity
  // brick appends its own code after this one, and returning from here would
  // skip it.
  if (deq >= deqeps) {
  const auto flow_slope = deq / R;
  // Gradient of Deq with respect to the deviatoric strain increment:
  // dDeq/dDe = (2 / (3 Deq)) De. Already deviatoric, so contracting it with the
  // deviator projector leaves it unchanged and dDeq/ddeel is simply this.
  const auto ndeq = (2 / (3 * deq)) * de;

  real exp_bp[Nss];
  real dg_abs_regularized[Nss];
  real dg_abs_derivative[Nss];
  for (size_type i = 0; i != Nss; ++i) {
    const auto dg_abs = abs(dg[i]);
    const auto slip_smooth = srixSlipSmoothingDelta > strain(0);
    const auto slip_delta = srixSlipSmoothingDelta;
    const auto slip_t = slip_smooth ? dg_abs / slip_delta : 0;
    dg_abs_regularized[i] =
        slip_smooth && dg_abs < slip_delta
            ? slip_delta * (3 * power<2>(slip_t) - 3 * power<3>(slip_t) +
                            power<4>(slip_t))
            : dg_abs;
    dg_abs_derivative[i] =
        slip_smooth && dg_abs < slip_delta
            ? 6 * dg[i] / slip_delta -
                  9 * dg[i] * dg_abs / power<2>(slip_delta) +
                  4 * power<3>(dg[i]) / power<3>(slip_delta)
            : (dg[i] > strain(0) ? 1
                                  : (dg[i] < strain(0) ? -1
                                                        : srixSlipZeroDerivative));
    const auto p_ = p[i] + theta * dg_abs_regularized[i];
    exp_bp[i] = exp(-b * p_);
  }
  for (size_type i = 0; i != Nss; ++i) {
    const auto tau = sig | ss.mus[i];
    auto r = tau0;
    for (size_type j = 0; j != Nss; ++j) {
      r += Q * m(i, j) * (1 - exp_bp[j]);
    }
    const auto da =  //
        (dg[i] - d * a[i] * dg_abs_regularized[i]) /
        (1 + theta * d * dg_abs_regularized[i]);
    const auto x = C * (a[i] + theta * da);
    // Optional Charbonnier regularisation of the signed Macaulay flow.
    // For epsilon=0 this is exactly the historical branch. For epsilon>0,
    // rho(v)=sqrt(v^2+epsilon^2)-epsilon approximates |v| and the positive
    // part is regularised with the corresponding smooth square-root form.
    const auto drive = tau - x;
    const auto smooth = srixSmoothingEpsilon > stress(0);
    const auto drive_norm = smooth
        ? pow(pow(abs(drive), srixSmoothingExponent) +
                  pow(srixSmoothingEpsilon, srixSmoothingExponent),
              1 / srixSmoothingExponent)
        : abs(drive);
    const auto drive_abs = smooth
        ? drive_norm - srixSmoothingEpsilon
        : drive_norm;
    const auto drive_sign = smooth
        ? drive / drive_norm
        : (drive > stress(0) ? 1 : -1);
    const auto overstress = drive_abs - r;
    const auto overstress_norm = smooth
        ? pow(pow(abs(overstress), srixSmoothingExponent) +
                  pow(srixSmoothingEpsilon, srixSmoothingExponent),
              1 / srixSmoothingExponent)
        : abs(overstress);
    const auto f = smooth
        ? (overstress + overstress_norm) / 2
        : max(overstress, stress(0));
    // No overflow guard here: the flow rule is linear in f, unlike the Norton
    // power of Meric-Cailletaud. Rejecting a large f would discard valid states.
    //
    // The slope of the flow rule with respect to f is Deq / R on an active
    // system and ZERO on an inactive one, where the bracket clamps. Unlike
    // Meric-Cailletaud, where dv = n v / f vanishes on its own as f goes to
    // zero, nothing here vanishes by itself: Deq / R does not depend on f at
    // all, so it stays finite as the bracket closes. (Deq itself is a function
    // of the unknowns, as built above; it is only with respect to f that this
    // slope is constant.) Writing the active slope on an inactive system
    // corrupts the Jacobian by exactly the number of inactive systems, which
    // makes the local Newton fail non-monotonically in the step size.
    const auto drive_abs_derivative = smooth
        ? (drive > stress(0) ? 1 : -1) *
              pow(abs(drive) / drive_norm, srixSmoothingExponent - 1)
        : (drive > stress(0) ? 1 : -1);
    const auto direction_derivative = smooth
        ? (drive_norm - drive * drive_abs_derivative) /
              (drive_norm * drive_norm)
        : 0;
    const auto dpositive = smooth
        ? (1 + (overstress > stress(0) ? 1 : -1) *
              pow(abs(overstress) / overstress_norm, srixSmoothingExponent - 1)) / 2
        : (overstress > stress(0) ? 1 : 0);
    const auto dflow = smooth
        ? flow_slope * (dpositive * drive_abs_derivative * drive_sign +
                        f * direction_derivative)
        : flow_slope * dpositive;
    const auto dflow_hardening = flow_slope * dpositive;
    const auto sgn = drive_sign;
    // elasticity
    feel += dg[i] * ss.mus[i];
    dfeel_ddg(i) = ss.mus[i];
    // rate-independent plasticity
    fg[i] -= flow_slope * f * sgn;
    // Two distinct routes carry the strain increment into this residual: f
    // through the stress, and Deq through the flow amplitude. Differentiating
    // f alone would reproduce the incomplete tangent this formulation exists to
    // avoid, so the Deq route is carried explicitly below as -(f sgn / R) dDeq.
    const auto damplitude = f * sgn / R;
    dfg_ddeel(i) = -dflow * theta * (ss.mus[i] | D) - damplitude * ndeq;
    const auto dN = 1 - d * a[i] * dg_abs_derivative[i];
    const auto dD = theta * d * dg_abs_derivative[i];
    const auto N = dg[i] - d * a[i] * dg_abs_regularized[i];
    const auto back_denominator = 1 + theta * d * dg_abs_regularized[i];
    const auto dda_ddg =
        (dN * back_denominator - N * dD) / power<2>(back_denominator);
    dfg_ddg(i, i) += dflow * C * theta * dda_ddg;
    for (size_type j = 0; j != Nss; ++j) {
      const auto dr = Q * m(i, j) * theta * b * exp_bp[j] *
                      dg_abs_derivative[j];
      dfg_ddg(i, j) += dflow_hardening * dr * sgn - damplitude * (ndeq | ss.mus[j]);
    }
  }
  }  // end of the Deq >= deqeps branch
}

@UpdateAuxiliaryStateVariables {
  using size_type = unsigned short;
  for (size_type i = 0; i != Nss; ++i) {
    // Same implicit hardening update as Meric-Cailletaud: Dp_s = |Dg_s|.
    const auto dg_abs = abs(dg[i]);
    const auto slip_smooth = srixSlipSmoothingDelta > strain(0);
    const auto slip_delta = srixSlipSmoothingDelta;
    const auto slip_t = slip_smooth ? dg_abs / slip_delta : 0;
    const auto dg_abs_regularized =
        slip_smooth && dg_abs < slip_delta
            ? slip_delta * (3 * power<2>(slip_t) - 3 * power<3>(slip_t) +
                            power<4>(slip_t))
            : dg_abs;
    p[i] += dg_abs_regularized;
    const auto da =  //
        (dg[i] - d * a[i] * dg_abs_regularized) /
        (1 + theta * d * dg_abs_regularized);
    a[i] += da;
  }
}
