@DSL ImplicitGenericBehaviour;
@Behaviour Fcc316LForestRubinSrixGeneric3D;
@Author fem_inhouse project;
@Date 03 / 08 / 2026;
@Description {
  Forest-Rubin SRIX (also published as RubiX) rate-independent FCC single
  crystal plasticity, small strain.

  Samuel Forest and M. B. Rubin, A rate-independent crystal plasticity model
  with a smooth elastic-plastic transition and no slip indeterminacy,
  European Journal of Mechanics A/Solids, volume 55, pages 278 to 288, 2016.
  The DOI is quoted in docs/explanation/forest_rubin_srix.md; MFront parses
  bare DOI strings as malformed numbers, so it is deliberately absent here.

  Everything except the flow rule is shared with Fcc316LMericCailletaud: the
  same twelve octahedral slip systems, the same interaction matrix, the same
  saturating isotropic hardening (tau0, Q, b), the same Armstrong-Frederick
  kinematic hardening (C, d), the same cubic elasticity and the same implicit
  update Dp_s = |Dg_s|.

  The flow rule, equation (7)

  Meric-Cailletaud, rate dependent:

      dg_s/dt = <f_s / K>^n sign(tau_s - X_s)

  SRIX, rate independent:

      dg_s/dt = eqrate <f_s / R> sign(tau_s - X_s)

  where eqrate is the von Mises equivalent rate of the deviatoric total strain,
  equation (8). Incrementally, over a step in which the strain varies linearly:

      Dg_s = Deq <f_s / R> sign(tau_s - X_s),
      Deq  = sqrt(2/3 De : De),  De = dev(deel) + sum_s Dg_s dev(m_s).

  Time enters only through Deq, which is itself a strain measure, so the
  response depends on the strain PATH and not on how fast it is traversed.
  There is no dt anywhere below, and test_srix_is_time_independent asserts it
  stays that way.

  How Deq is built, and why it is not built from deto

  Deq is assembled from the UNKNOWNS of the implicit system, deel and dg, and
  not from the data deto. The two agree at convergence -- the elastic residual
  of the StandardElasticity brick is feel = deel - deto + sum_s Dg_s m_s, so
  deto = deel + sum_s Dg_s m_s exactly there -- but they are not
  interchangeable while iterating, and the choice decides whether the tangent
  is right.

  Writing Deq from deto would make it a CONSTANT of the local Newton system.
  The flow function would then carry an explicit dependence on deto that the
  brick does not know about, and the consistent tangent it assembles would be
  missing a rank-one term. That was measured, not feared: the tangent was
  exact in the elastic range and wrong by 2e-2 to 4e-1 relative once any
  system became active. Building Deq from deel and dg instead puts the whole
  dependence inside the Jacobian, where the brick can see it, and the same
  finite-difference comparison then agrees to 7e-7, which is the truncation
  floor of the difference itself.

  The Jacobian is still simpler than the Meric-Cailletaud one: the flow
  function is linear in f, so d(flow)/df = Deq / R replaces the Norton n v / f.
  What that linearity costs is that the Macaulay bracket no longer
  self-differentiates, so an inactive system must contribute nothing rather
  than a constant; see the dflow switch in the integrator.

  Parameters

  Every parameter below is an MFront @Parameter and can therefore be overridden
  at run time through MGIS, without editing or recompiling this file. The
  registered sets live in fem_inhouse.core.single_crystal_presets and are
  selected by identifier; the values compiled in here are the historical set
  derived from Nasri and others, 2018, kept as the default so that an
  unconfigured run reproduces the archived behaviour.

  R is NOT an identified 316L parameter. The default is the analytical
  transposition of a Meric-Cailletaud pair (K, n) through equation (16) at a
  chosen reference strain rate, computed by srix_overstress_modulus_from_meric
  in that same module: K = 12 MPa, n = 11, reference rate one thousandth per
  second. That is one way to obtain R and not the only one -- it can equally be
  identified directly, from the width of the elastic-plastic transition of a
  measured curve, which is what
  validation/srix_316l_calibration_preregistration.md registers as the intended
  route. Until then the value carries the status analytical_transposition and
  no result computed with it may be presented as a 316L identification.
}

@ModellingHypothesis Tridimensional;
@OrthotropicBehaviour;

@Algorithm NewtonRaphson;
@Epsilon 1.e-14;
@IterMax 100;
@Theta 1;


@CrystalStructure FCC;
@SlidingSystem<0, 1, -1>{1, 1, 1};
@InteractionMatrix{1.0, 1.0, 0.6, 1.8, 1.6, 12.3, 1.6};

//! Overstress modulus of the SRIX flow rule, equation (7). Replaces (K, n).
@Parameter stress R = 18.7819100705;
R.setEntryName("SrixOverstressModulus");

@Parameter stress tau0 = 40.;
@Parameter stress Q = 10.;
@Parameter real b = 3.;
@Parameter real d = 1500.;
@Parameter stress C = 40000.;

// Scalar micromorphic extension used by the generic non-local solver.  The
// local SRIX parameters above remain unchanged; Hchi only couples the scalar
// accumulated slip source to the externally supplied non-local field.
@MaterialProperty stress Hchi;
Hchi.setEntryName("MicromorphicCouplingModulus");

@Gradient StrainStensor eto;
eto.setGlossaryName("Strain");
@ThermodynamicForce StressStensor sig;
sig.setGlossaryName("Stress");
@Gradient strain chi;
chi.setEntryName("NonlocalEquivalentPlasticStrain");
@ThermodynamicForce strain pobs;
pobs.setEntryName("AccumulatedSlipOutput");
@StateVariable StrainStensor eel;
@StateVariable strain Gamma;
Gamma.setEntryName("AccumulatedSlip");
@IntegrationVariable strain chilocal;
chilocal.setEntryName("LocalNonlocalEquivalentPlasticStrain");

/*!
 * Equivalent strain increment below which the step is treated as producing no
 * slip at all. Guards the rate-independent flow rule against a vanishing or
 * purely hydrostatic increment; see section 4.3 of the specification.
 */
@Parameter strain deqeps = 1.e-14;
deqeps.setEntryName("MinimumEquivalentStrainIncrement");

@StateVariable strain g[Nss];
g.setEntryName("PlasticSlip");

@AuxiliaryStateVariable strain p[Nss];
p.setEntryName("EquivalentPlasticSlip");

@AuxiliaryStateVariable strain a[Nss];

@LocalVariable Stensor4 Ce;
a.setEntryName("BackStrain");

@Predictor {
  deel = deto;
  for (unsigned short i=0; i!=Nss; ++i) { dg[i] = 0; }
  dGamma = 0;
}

@ComputeThermodynamicForces {
  sig = Ce * eel;
  pobs = Gamma;
}

@ComputeFinalThermodynamicForces {
  sig = Ce * eel;
  pobs = Gamma;
}

@TangentOperatorBlocks{dsig_ddeto, dsig_ddchi, dpobs_ddeto, dpobs_ddchi};

@InitLocalVariables {
  // Cubic elasticity in the material frame, matching the production brick.
  Ce = Stensor4(0.);
  Ce(0,0) = 197000.; Ce(1,1) = 197000.; Ce(2,2) = 197000.;
  Ce(0,1) = 125000.; Ce(0,2) = 125000.; Ce(1,0) = 125000.;
  Ce(1,2) = 125000.; Ce(2,0) = 125000.; Ce(2,1) = 125000.;
  // Stensor uses sqrt(2) shear components, hence the diagonal entries are 2G.
  Ce(3,3) = 244000.; Ce(4,4) = 244000.; Ce(5,5) = 244000.;
}

@Integrator {
  using size_type = unsigned short;
  const auto& ss = Fcc316LForestRubinSrixGeneric3DSlipSystems<real>::getSlipSystems();
  const auto& m = ss.him;
  // The legacy SRIX law declares chi as an external state variable. In the
  // Implicit/Generic integrator convention, that is the value at the start of
  // the increment; dchi is its prescribed increment. Preserve that contract
  // while routing the array-valued slip residuals through the scalar proxy.
  fchilocal = chilocal + dchilocal - chi;
  dfchilocal_ddchilocal = 1.;
  feel = deel - deto;
  dfeel_ddeel = Stensor4::Id();
  for (size_type i=0; i!=Nss; ++i) {
    feel += dg[i] * ss.mus[i];
    dfeel_ddg(i) = ss.mus[i];
    fg[i] = dg[i];
    dfg_ddg(i, i) = 1.;
  }
  fGamma = dGamma;
  dfGamma_ddGamma = 1.;
  for (size_type i=0; i!=Nss; ++i) {
    fGamma -= abs(dg[i]);
    dfGamma_ddg(i) = -(dg[i] > 0 ? 1 : (dg[i] < 0 ? -1 : 0));
  }


  // Equation (8): equivalent measure of the deviatoric total strain increment.
  //
  // It is built from the UNKNOWNS rather than from deto. The elastic residual
  // of the StandardElasticity brick is feel = deel - deto + sum(dg_s m_s), so
  // at convergence deto = deel + sum(dg_s m_s) exactly, and since the Schmid
  // tensors are deviatoric the two readings of Deq are algebraically the same.
  //
  // Writing it this way is what makes the consistent tangent correct. Built
  // from deto, Deq is a constant of the local system and its dependence on the
  // imposed strain is invisible to the brick, which then returns a tangent
  // missing a rank-one term: measured at 2 to 42 percent in established
  // plasticity, and exact only in the elastic range. Built from deel and dg,
  // the same dependence flows through the implicit Jacobian and the brick
  // assembles the right operator with no hand-written @TangentOperator.
  //
  // It also keeps the plane-stress closure honest: every update of the
  // transverse strain changes deel and therefore Deq, so Deq is never frozen on
  // the in-plane components alone.
  auto de = deviator(deel);
  for (size_type i = 0; i != Nss; ++i) {
    de += dg[i] * ss.mus[i];
  }
  const auto deq = sqrt(2 * (de | de) / 3);

  // Section 4.3. A null or purely hydrostatic increment produces no slip. The
  // default residual fg = dg with an identity Jacobian already expresses
  // Dg = 0, and feel = deel - deto left untouched by the brick is the purely
  // elastic answer, so skipping the loop is exactly the required branch. No
  // division by deq is ever reached.
  //
  // This is a guarded block rather than an early return: the StandardElasticity
  // brick appends its own code after this one, and returning from here would
  // skip it.
  if (deq >= deqeps) {
  const auto flow_slope = deq / R;
  // Gradient of Deq with respect to the deviatoric strain increment:
  // dDeq/dDe = (2 / (3 Deq)) De. Already deviatoric, so contracting it with the
  // deviator projector leaves it unchanged and dDeq/ddeel is simply this.
  const auto ndeq = (2 / (3 * deq)) * de;

  real exp_bp[Nss];
  real dg_abs[Nss];
  real dg_abs_derivative[Nss];
  real gamma_trial = 0;
  for (size_type i = 0; i != Nss; ++i) {
    dg_abs[i] = abs(dg[i]);
    // |dg| is nonsmooth at dg=0.  Its Clarke generalized derivative is
    // [-1,1]; select the symmetric element 0 at the cusp.  This changes only
    // the generalized Jacobian used by local Newton, never the SRIX residual
    // or state update.  See docs/reference/numerics/srix_semismooth_jacobian.md.
    dg_abs_derivative[i] = dg[i] > strain(0) ? 1
        : (dg[i] < strain(0) ? -1 : 0);
    const auto p_ = p[i] + theta * dg_abs[i];
    gamma_trial += p_;
    exp_bp[i] = exp(-b * p_);
  }
  for (size_type i = 0; i != Nss; ++i) {
    const auto tau = sig | ss.mus[i];
    auto r = tau0;
    for (size_type j = 0; j != Nss; ++j) {
      r += Q * m(i, j) * (1 - exp_bp[j]);
    }
    // The scalar source is the accumulated positive slip Gamma=sum_s p_s.
    // Apply the same scalar micromorphic hardening to every system.  This is a
    // numerical transposition of the qualified J2 architecture, not a new
    // identified SRIX parameterisation; Hchi is therefore supplied explicitly
    // by the caller and is kept separate from the local SRIX hardening.
    if (Hchi != stress(0)) {
      r += Hchi * (gamma_trial - (chilocal + theta * dchilocal));
    }
    const auto da = (dg[i] - d * a[i] * dg_abs[i]) /
                    (1 + theta * d * dg_abs[i]);
    const auto x = C * (a[i] + theta * da);
    const auto drive = tau - x;
    const auto drive_abs = abs(drive);
    const auto drive_sign = drive > stress(0) ? 1 : -1;
    const auto overstress = drive_abs - r;
    const auto f = max(overstress, stress(0));
    // No overflow guard here: the flow rule is linear in f, unlike the Norton
    // power of Meric-Cailletaud. Rejecting a large f would discard valid states.
    //
    // The slope of the flow rule with respect to f is Deq / R on an active
    // system and ZERO on an inactive one, where the bracket clamps. Unlike
    // Meric-Cailletaud, where dv = n v / f vanishes on its own as f goes to
    // zero, nothing here vanishes by itself: Deq / R does not depend on f at
    // all, so it stays finite as the bracket closes. (Deq itself is a function
    // of the unknowns, as built above; it is only with respect to f that this
    // slope is constant.) Writing the active slope on an inactive system
    // corrupts the Jacobian by exactly the number of inactive systems, which
    // makes the local Newton fail non-monotonically in the step size.
    const auto dpositive = overstress > stress(0) ? 1 : 0;
    const auto dflow = flow_slope * dpositive;
    const auto dflow_hardening = flow_slope * dpositive;
    const auto sgn = drive_sign;
    dfg_ddchilocal(i) = -theta * dflow_hardening * Hchi * sgn;
    // elasticity
    // rate-independent plasticity
    fg[i] -= flow_slope * f * sgn;
    // Two distinct routes carry the strain increment into this residual: f
    // through the stress, and Deq through the flow amplitude. Differentiating
    // f alone would reproduce the incomplete tangent this formulation exists to
    // avoid, so the Deq route is carried explicitly below as -(f sgn / R) dDeq.
    const auto damplitude = f * sgn / R;
    dfg_ddeel(i) = -dflow * theta * (ss.mus[i] | Ce) - damplitude * ndeq;
    const auto dN = 1 - d * a[i] * dg_abs_derivative[i];
    const auto dD = theta * d * dg_abs_derivative[i];
    const auto N = dg[i] - d * a[i] * dg_abs[i];
    const auto back_denominator = 1 + theta * d * dg_abs[i];
    const auto dda_ddg =
        (dN * back_denominator - N * dD) / power<2>(back_denominator);
    dfg_ddg(i, i) += dflow * C * theta * dda_ddg;
    for (size_type j = 0; j != Nss; ++j) {
      const auto dr = Q * m(i, j) * theta * b * exp_bp[j] *
                      dg_abs_derivative[j];
      const auto dmicromorphic = Hchi * dg_abs_derivative[j];
      dfg_ddg(i, j) += dflow_hardening * (dr + dmicromorphic) * sgn
                       - damplitude * (ndeq | ss.mus[j]);
    }
  }
  }  // end of the Deq >= deqeps branch
}

@TangentOperator {
  dfchilocal_ddchi = -1.;
  dfeel_ddeto = -Stensor4::Id();
  dfeel_ddchi = Stensor(0.);
  dfGamma_ddeto = Stensor(0.);
  dfGamma_ddchi = 0.;
  auto ddeel_ddeto = Stensor4{};
  auto dGamma_ddeto = Stensor{};
  getIntegrationVariablesDerivatives_eto(ddeel_ddeto, dGamma_ddeto);
  auto ddeel_ddchi = Stensor{};
  auto dGamma_ddchi = real{};
  getIntegrationVariablesDerivatives_chi(ddeel_ddchi, dGamma_ddchi);
  dsig_ddeto = Ce * ddeel_ddeto;
  dsig_ddchi = Ce * ddeel_ddchi;
  dpobs_ddeto = dGamma_ddeto;
  dpobs_ddchi = dGamma_ddchi;
}

@UpdateAuxiliaryStateVariables {
  using size_type = unsigned short;
  for (size_type i = 0; i != Nss; ++i) {
    // Same implicit hardening update as Meric-Cailletaud: Dp_s = |Dg_s|.
    const auto dg_abs = abs(dg[i]);
    p[i] += dg_abs;
    const auto da = (dg[i] - d * a[i] * dg_abs) /
                    (1 + theta * d * dg_abs);
    a[i] += da;
  }
}
