@DSL Implicit;
@Behaviour StructuralPlaneStressJ2Probe;
@Author fem_inhouse project;
@Date 09 / 08 / 2026;
@Description {
  J2 proof-of-concept for the generic StructuralPlaneStress3D row
  transformation. The closure intentionally does not name the plastic
  variable generated by StandardElastoViscoPlasticity.
};

@ModellingHypothesis Tridimensional;
@OrthotropicBehaviour;
@Algorithm NewtonRaphson;
@Epsilon 1.e-12;
@IterMax 100;
@Theta 1;

@Parameter stress sy0 = 250.;
@Parameter stress K = 1000.;
@Parameter real ludwik_n = 0.2;
@Parameter real p0 = 1.e-6;

@Brick StandardElastoViscoPlasticity {
  stress_potential : "Hooke" {
    young_modulus : 205000,
    poisson_ratio : 0.3
  },
  inelastic_flow : "Plastic" {
    criterion : "Mises",
    isotropic_hardening : "UserDefined" {
      R : "p <= p0 ? sy0+K*p*p0**(ludwik_n-1) : sy0+K*p**ludwik_n",
      dR_dp : "p < p0 ? K*p0**(ludwik_n-1) : K*ludwik_n*p**(ludwik_n-1)"
    },
    save_yield_surface_radius : true
  }
};

@AuxiliaryStateVariable real globalK[6];
globalK.setEntryName("StructuralTotalStrain");

@Private {
  static Stensor rotate(const Stensor& s) {
    constexpr auto r00 = real(0.6517403912340062);
    constexpr auto r01 = real(-0.7326322075147665);
    constexpr auto r02 = real(0.19617469496901108);
    constexpr auto r10 = real(0.7532585459971657);
    constexpr auto r11 = real(0.5950699920075869);
    constexpr auto r12 = real(-0.2801664995932355);
    constexpr auto r20 = real(0.08852132690137686);
    constexpr auto r21 = real(0.33036608954935215);
    constexpr auto r22 = real(0.9396926207859084);
    const auto q = sqrt(real(2));
    const auto s0 = s(0), s1 = s(1), s2 = s(2);
    const auto s3 = s(3), s4 = s(4), s5 = s(5);
    auto r = s;
    r(0) = r00*r00*s0+r01*r01*s1+r02*r02*s2
         + q*(r00*r01*s3+r00*r02*s4+r01*r02*s5);
    r(1) = r10*r10*s0+r11*r11*s1+r12*r12*s2
         + q*(r10*r11*s3+r10*r12*s4+r11*r12*s5);
    r(2) = r20*r20*s0+r21*r21*s1+r22*r22*s2
         + q*(r20*r21*s3+r20*r22*s4+r21*r22*s5);
    r(3) = q*(r00*r10*s0+r01*r11*s1+r02*r12*s2)
         +(r00*r11+r01*r10)*s3+(r00*r12+r02*r10)*s4
         +(r01*r12+r02*r11)*s5;
    r(4) = q*(r00*r20*s0+r01*r21*s1+r02*r22*s2)
         +(r00*r21+r01*r20)*s3+(r00*r22+r02*r20)*s4
         +(r01*r22+r02*r21)*s5;
    r(5) = q*(r10*r20*s0+r11*r21*s1+r12*r22*s2)
         +(r10*r21+r11*r20)*s3+(r10*r22+r12*r20)*s4
         +(r11*r22+r12*r21)*s5;
    return r;
  }
};

@Integrator {
  constexpr auto Gref = real(205000.);
  constexpr ushort system_size = StensorSize + 1;
  constexpr ushort transverse[3] = {2, 4, 5};
  StiffnessTensor Hooke;
  computeElasticStiffness<3, stress>::exe(Hooke, this->lambda_tdt, this->mu_tdt);
  const auto sig_global = rotate(this->sig);
  auto K_material = Stensor(real(0));
  for (ushort i = 0; i != StensorSize; ++i) {
    K_material(i) = this->fzeros(i) + this->deto(i);
  }
  const auto K_global = rotate(K_material);
  tmatrix<StensorSize, StensorSize, real> rotation;
  for (ushort j = 0; j != StensorSize; ++j) {
    auto basis = Stensor(real(0));
    basis(j) = 1;
    const auto column = rotate(basis);
    for (ushort i = 0; i != StensorSize; ++i) {
      rotation(i, j) = column(i);
    }
  }
  const auto raw_jacobian = this->jacobian;
  for (ushort i = 0; i != StensorSize; ++i) {
    this->fzeros(i) = K_global(i) - this->deto(i);
    for (ushort j = 0; j != system_size; ++j) {
      auto value = real(0);
      for (ushort k = 0; k != StensorSize; ++k) {
        value += rotation(i, k) * raw_jacobian(k, j);
      }
      this->jacobian(i, j) = value;
    }
  }
  for (ushort k = 0; k != 3; ++k) {
    const auto i = transverse[k];
    this->fzeros(i) = sig_global(i) / Gref;
    for (ushort j = 0; j != system_size; ++j) {
      auto value = real(0);
      for (ushort l = 0; l != StensorSize; ++l) {
        value += rotation(i, l) * Hooke(l, j < StensorSize ? j : 0);
      }
      this->jacobian(i, j) = (j < StensorSize) ? value / Gref : real(0);
    }
  }
};

@UpdateAuxiliaryStateVariables {
  const auto global_total = rotate(this->eel);
  for (ushort i = 0; i != StensorSize; ++i) {
    this->globalK[i] = global_total(i);
  }
};

@TangentOperator {
  using namespace tfel::math;
  constexpr ushort system_size = StensorSize + 1;
  constexpr ushort active_columns[3] = {0, 1, 3};
  StiffnessTensor Hooke;
  computeElasticStiffness<3, stress>::exe(Hooke, this->lambda_tdt, this->mu_tdt);
  // updateStateVariables has already promoted deel/dp to the committed state
  // when this hook runs. Reconstruct the original local Newton state before
  // rebuilding A, then restore the final state before returning to MGIS.
  const auto saved_eel = Stensor(this->eel);
  const auto saved_p = this->p;
  this->eel -= this->deel;
  this->p -= this->dp;
  this->computeThermodynamicForces();
  this->computeFdF(false);
  this->eel = saved_eel;
  this->p = saved_p;
  auto A = this->jacobian;
  TinyPermutation<system_size> permutation;
  if (!TinyMatrixSolve<system_size, real, false>::decomp(A, permutation)) {
    return false;
  }
  this->Dt = Stensor4(real(0));
  for (ushort column = 0; column != 3; ++column) {
    tvector<system_size, real> rhs(real(0));
    rhs(active_columns[column]) = 1;
    if (!TinyMatrixSolve<system_size, real, false>::back_substitute(
            A, permutation, rhs)) {
      return false;
    }
    auto stress_material = Stensor(real(0));
    for (ushort i = 0; i != StensorSize; ++i) {
      for (ushort j = 0; j != StensorSize; ++j) {
        stress_material(i) += Hooke(i, j) * rhs(j);
      }
    }
    const auto stress_global = rotate(stress_material);
    for (ushort i = 0; i != StensorSize; ++i) {
      this->Dt(i, active_columns[column]) = stress_global(i);
    }
  }
  this->computeFinalThermodynamicForces();
};
